// COMSOL Multiphysics 6.4.0.293 model "exp20a_turn_capacitance_4p4s.mph"
// Outline of the model tree

Parameters
  Np = 4  // EXP-020 parameter
  Ns = 4  // EXP-020 parameter
  r_core = 10[mm]  // EXP-020 parameter
  h_core = 16[mm]  // EXP-020 parameter
  t_ins_core = 1[mm]  // EXP-020 parameter
  w_turn = 1[mm]  // EXP-020 parameter
  t_turn = 0.5[mm]  // EXP-020 parameter
  g_turn = 0.25[mm]  // EXP-020 parameter
  g_ps = 1.5[mm]  // EXP-020 parameter
  epsr_ins = 3.5  // EXP-020 parameter
  r_air = 35[mm]  // EXP-020 parameter
  h_air = 25[mm]  // EXP-020 parameter
  V1 = if(case_id==1||case_id==9||case_id==10||case_id==11||case_id==12||case_id==13||case_id==14||case_id==15,1[V],0[V])  // P1 excitation selector
  V2 = if(case_id==2||case_id==9||case_id==16||case_id==17||case_id==18||case_id==19||case_id==20||case_id==21,1[V],0[V])  // P2 excitation selector
  V3 = if(case_id==3||case_id==10||case_id==16||case_id==22||case_id==23||case_id==24||case_id==25||case_id==26,1[V],0[V])  // P3 excitation selector
  V4 = if(case_id==4||case_id==11||case_id==17||case_id==22||case_id==27||case_id==28||case_id==29||case_id==30,1[V],0[V])  // P4 excitation selector
  V5 = if(case_id==5||case_id==12||case_id==18||case_id==23||case_id==27||case_id==31||case_id==32||case_id==33,1[V],0[V])  // S1 excitation selector
  V6 = if(case_id==6||case_id==13||case_id==19||case_id==24||case_id==28||case_id==31||case_id==34||case_id==35,1[V],0[V])  // S2 excitation selector
  V7 = if(case_id==7||case_id==14||case_id==20||case_id==25||case_id==29||case_id==32||case_id==34||case_id==36,1[V],0[V])  // S3 excitation selector
  V8 = if(case_id==8||case_id==15||case_id==21||case_id==26||case_id==30||case_id==33||case_id==35||case_id==36,1[V],0[V])  // S4 excitation selector
  case_id = 36  // Capacitance extraction excitation case

Geometry
  geom1 "几何 1" (2D axisymmetric, length unit m)
    air: Rectangle "矩形" | size = {0.035, 0.025}; pos = {0.0, -0.0125}
    core: Rectangle "矩形 2" | size = {0.01, 0.016}; pos = {0.0, -0.008}
    P1: Rectangle "矩形 1" | size = {0.0005, 0.001}; pos = {0.011, -0.002375}
    P2: Rectangle "矩形 2a" | size = {0.0005, 0.001}; pos = {0.011, -0.001125}
    P3: Rectangle "矩形 3" | size = {0.0005, 0.001}; pos = {0.011, 0.000125}
    P4: Rectangle "矩形 4" | size = {0.0005, 0.001}; pos = {0.011, 0.001375}
    S1: Rectangle "矩形 1a" | size = {0.0005, 0.001}; pos = {0.013, -0.002375}
    S2: Rectangle "矩形 2b" | size = {0.0005, 0.001}; pos = {0.013, -0.001125}
    S3: Rectangle "矩形 3a" | size = {0.0005, 0.001}; pos = {0.013, 0.000125}
    S4: Rectangle "矩形 4a" | size = {0.0005, 0.001}; pos = {0.013, 0.001375}
    fin: Finalize "形成联合体" | symmetriccoord = 8

Physics
  es: Electrostatics "静电" on all domains
    dependent variable V
    fsp1: FreeSpace "自由空间 1" (default)
    axi1: AxialSymmetry "轴对称 1" (default)
    zc1: ZeroCharge "零电荷 1" (default)
    init1: init "初始值 1" (default)
    chargeconservation_1: ChargeConservation "ChargeConservation (Boundaries [1, 2, 3, 4, 5, 6, 7, 8, 9, 10])" on domains 1-10
      epsilonr_mat = userdef
      epsilonr = epsr_ins
    ground_1: Ground "Ground (Boundaries [3, 4, 6, 8, 41])" on boundaries 3, 4, 6, 8, 41
    electricpotential_1: ElectricPotential "ElectricPotential (Boundaries [9, 10, 11, 21])" on boundaries 9-11, 21
      V0 = V1
    electricpotential_2: ElectricPotential "ElectricPotential (Boundaries [12, 13, 14, 22])" on boundaries 12-14, 22
      V0 = V2
    electricpotential_3: ElectricPotential "ElectricPotential (Boundaries [15, 16, 17, 23])" on boundaries 15-17, 23
      V0 = V3
    electricpotential_4: ElectricPotential "ElectricPotential (Boundaries [18, 19, 20, 24])" on boundaries 18-20, 24
      V0 = V4
    electricpotential_5: ElectricPotential "ElectricPotential (Boundaries [25, 26, 27, 37])" on boundaries 25-27, 37
      V0 = V5
    electricpotential_6: ElectricPotential "ElectricPotential (Boundaries [28, 29, 30, 38])" on boundaries 28-30, 38
      V0 = V6
    electricpotential_7: ElectricPotential "ElectricPotential (Boundaries [31, 32, 33, 39])" on boundaries 31-33, 39
      V0 = V7
    electricpotential_8: ElectricPotential "ElectricPotential (Boundaries [34, 35, 36, 40])" on boundaries 34-36, 40
      V0 = V8

Mesh
  mesh1 "网格 1" (physics-controlled)

Studies
  stdC "研究"
  stdC2 "研究 2"
    step1: Stationary "稳态 1"

Solver configurations
  sol1 "解 1" (study stdC2)
    v1: Variables "因变量 1"
    s1: Stationary "稳态求解器 1"
      dDef: Direct "直接"
      fc1: FullyCoupled "全耦合 1"

Datasets
  dset1: Solution | solution = sol1