// COMSOL Multiphysics 6.4.0.293 model "exp20_teacher_4p4_axisym_C_LM_converged_charge_verified_v2.mph"
// Outline of the model tree

Parameters
  Np = 4  // EXP-020 parameter
  Ns = 4  // EXP-020 parameter
  r_core = 10[mm]  // EXP-020 parameter
  h_core = 16[mm]  // EXP-020 parameter
  t_ins_core = 1[mm]  // EXP-020 parameter
  w_turn = 1[mm]  // EXP-020 parameter
  t_turn = 0.5[mm]  // EXP-020 parameter
  g_turn = 0.25[mm]  // EXP-020 parameter
  g_ps = 1.5[mm]  // EXP-020 parameter
  epsr_ins = 3.5  // EXP-020 parameter
  r_air = 35[mm]  // EXP-020 parameter
  h_air = 25[mm]  // EXP-020 parameter
  V1 = if(case_id==1||case_id==9||case_id==10||case_id==11||case_id==12||case_id==13||case_id==14||case_id==15,1[V],0[V])  // Electrostatics disabled during LM extraction
  V2 = if(case_id==2||case_id==9||case_id==16||case_id==17||case_id==18||case_id==19||case_id==20||case_id==21,1[V],0[V])  // Electrostatics disabled during LM extraction
  V3 = if(case_id==3||case_id==10||case_id==16||case_id==22||case_id==23||case_id==24||case_id==25||case_id==26,1[V],0[V])  // Electrostatics disabled during LM extraction
  V4 = if(case_id==4||case_id==11||case_id==17||case_id==22||case_id==27||case_id==28||case_id==29||case_id==30,1[V],0[V])  // Electrostatics disabled during LM extraction
  V5 = if(case_id==5||case_id==12||case_id==18||case_id==23||case_id==27||case_id==31||case_id==32||case_id==33,1[V],0[V])  // Electrostatics disabled during LM extraction
  V6 = if(case_id==6||case_id==13||case_id==19||case_id==24||case_id==28||case_id==31||case_id==34||case_id==35,1[V],0[V])  // Electrostatics disabled during LM extraction
  V7 = if(case_id==7||case_id==14||case_id==20||case_id==25||case_id==29||case_id==32||case_id==34||case_id==36,1[V],0[V])  // Electrostatics disabled during LM extraction
  V8 = if(case_id==8||case_id==15||case_id==21||case_id==26||case_id==30||case_id==33||case_id==35||case_id==36,1[V],0[V])  // Electrostatics disabled during LM extraction
  case_id = 8  // Inductance extraction excitation case
  I1 = if(case_id==1||case_id==9||case_id==10||case_id==11||case_id==12||case_id==13||case_id==14||case_id==15,1[A],0[A])  // P1 current excitation selector
  I2 = if(case_id==2||case_id==9||case_id==16||case_id==17||case_id==18||case_id==19||case_id==20||case_id==21,1[A],0[A])  // P2 current excitation selector
  I3 = if(case_id==3||case_id==10||case_id==16||case_id==22||case_id==23||case_id==24||case_id==25||case_id==26,1[A],0[A])  // P3 current excitation selector
  I4 = if(case_id==4||case_id==11||case_id==17||case_id==22||case_id==27||case_id==28||case_id==29||case_id==30,1[A],0[A])  // P4 current excitation selector
  I5 = if(case_id==5||case_id==12||case_id==18||case_id==23||case_id==27||case_id==31||case_id==32||case_id==33,1[A],0[A])  // S1 current excitation selector
  I6 = if(case_id==6||case_id==13||case_id==19||case_id==24||case_id==28||case_id==31||case_id==34||case_id==35,1[A],0[A])  // S2 current excitation selector
  I7 = if(case_id==7||case_id==14||case_id==20||case_id==25||case_id==29||case_id==32||case_id==34||case_id==36,1[A],0[A])  // S3 current excitation selector
  I8 = if(case_id==8||case_id==15||case_id==21||case_id==26||case_id==30||case_id==33||case_id==35||case_id==36,1[A],0[A])  // S4 current excitation selector
  mur_core = 2000  // Linear teacher-model core relative permeability
  sigma_cu = 5.8e7[S/m]  // Copper conductivity

Couplings
  intQ1: Integration "积分 1" on boundaries 9-11, 21
  intQ2: Integration "积分 2" on boundaries 12-14, 22
  intQ3: Integration "积分 3" on boundaries 15-17, 23
  intQ4: Integration "积分 4" on boundaries 18-20, 24
  intQ5: Integration "积分 5" on boundaries 25-27, 37
  intQ6: Integration "积分 6" on boundaries 28-30, 38
  intQ7: Integration "积分 7" on boundaries 31-33, 39
  intQ8: Integration "积分 8" on boundaries 34-36, 40

Geometry
  geom1 "几何 1" (2D axisymmetric, length unit m)
    air: Rectangle "矩形" | size = {0.035, 0.025}; pos = {0.0, -0.0125}
    core: Rectangle "矩形 2" | size = {0.01, 0.016}; pos = {0.0, -0.008}
    P1: Rectangle "矩形 1" | size = {0.0005, 0.001}; pos = {0.011, -0.002375}
    P2: Rectangle "矩形 2a" | size = {0.0005, 0.001}; pos = {0.011, -0.001125}
    P3: Rectangle "矩形 3" | size = {0.0005, 0.001}; pos = {0.011, 0.000125}
    P4: Rectangle "矩形 4" | size = {0.0005, 0.001}; pos = {0.011, 0.001375}
    S1: Rectangle "矩形 1a" | size = {0.0005, 0.001}; pos = {0.013, -0.002375}
    S2: Rectangle "矩形 2b" | size = {0.0005, 0.001}; pos = {0.013, -0.001125}
    S3: Rectangle "矩形 3a" | size = {0.0005, 0.001}; pos = {0.013, 0.000125}
    S4: Rectangle "矩形 4a" | size = {0.0005, 0.001}; pos = {0.013, 0.001375}
    fin: Finalize "形成联合体" | symmetriccoord = 8

Physics
  es: Electrostatics "静电" on all domains
    dependent variable V
    fsp1: FreeSpace "自由空间 1" (default)
    axi1: AxialSymmetry "轴对称 1" (default)
    zc1: ZeroCharge "零电荷 1" (default)
    init1: init "初始值 1" (default)
    chargeconservation_1: ChargeConservation "ChargeConservation (Boundaries [1, 2, 3, 4, 5, 6, 7, 8, 9, 10])" on domains 1-10
      epsilonr_mat = userdef
      epsilonr = epsr_ins
    ground_1: Ground "Ground (Boundaries [3, 4, 6, 8, 41])" on boundaries 3, 4, 6, 8, 41
    electricpotential_1: ElectricPotential "ElectricPotential (Boundaries [9, 10, 11, 21])" on boundaries 9-11, 21
      V0 = V1
    electricpotential_2: ElectricPotential "ElectricPotential (Boundaries [12, 13, 14, 22])" on boundaries 12-14, 22
      V0 = V2
    electricpotential_3: ElectricPotential "ElectricPotential (Boundaries [15, 16, 17, 23])" on boundaries 15-17, 23
      V0 = V3
    electricpotential_4: ElectricPotential "ElectricPotential (Boundaries [18, 19, 20, 24])" on boundaries 18-20, 24
      V0 = V4
    electricpotential_5: ElectricPotential "ElectricPotential (Boundaries [25, 26, 27, 37])" on boundaries 25-27, 37
      V0 = V5
    electricpotential_6: ElectricPotential "ElectricPotential (Boundaries [28, 29, 30, 38])" on boundaries 28-30, 38
      V0 = V6
    electricpotential_7: ElectricPotential "ElectricPotential (Boundaries [31, 32, 33, 39])" on boundaries 31-33, 39
      V0 = V7
    electricpotential_8: ElectricPotential "ElectricPotential (Boundaries [34, 35, 36, 40])" on boundaries 34-36, 40
      V0 = V8
  inductioncurrents: InductionCurrents "磁场" on all domains
    dependent variable A = {Ar, Aphi, Az}
    fsp1: FreeSpace "自由空间 1" (default)
    axi1: AxialSymmetry "轴对称 1" (default)
    mi1: MagneticInsulation "磁绝缘 1" (default)
    init1: init "初始值 1" (default)
    coil_1: Coil "Coil (Boundaries [3])" on domains 3
      ConductorModel = Multi
      ICoil = I1
      N = 1
      sigmaCoil = sigma_cu
      FillingFactor = 1
    coil_2: Coil "Coil (Boundaries [4])" on domains 4
      ConductorModel = Multi
      ICoil = I2
      N = 1
      sigmaCoil = sigma_cu
      FillingFactor = 1
    coil_3: Coil "Coil (Boundaries [5])" on domains 5
      ConductorModel = Multi
      ICoil = I3
      N = 1
      sigmaCoil = sigma_cu
      FillingFactor = 1
    coil_4: Coil "Coil (Boundaries [6])" on domains 6
      ConductorModel = Multi
      ICoil = I4
      N = 1
      sigmaCoil = sigma_cu
      FillingFactor = 1
    coil_5: Coil "Coil (Boundaries [7])" on domains 7
      ConductorModel = Multi
      ICoil = I5
      N = 1
      sigmaCoil = sigma_cu
      FillingFactor = 1
    coil_6: Coil "Coil (Boundaries [8])" on domains 8
      ConductorModel = Multi
      ICoil = I6
      N = 1
      sigmaCoil = sigma_cu
      FillingFactor = 1
    coil_7: Coil "Coil (Boundaries [9])" on domains 9
      ConductorModel = Multi
      ICoil = I7
      N = 1
      sigmaCoil = sigma_cu
      FillingFactor = 1
    coil_8: Coil "Coil (Boundaries [10])" on domains 10
      ConductorModel = Multi
      ICoil = I8
      N = 1
      sigmaCoil = sigma_cu
      FillingFactor = 1
    ampereslaw_1: AmperesLaw "AmperesLaw (Boundaries [2])" on domains 2
      mur_mat = userdef
      mur = mur_core
      sigma_mat = userdef
      sigma = 0[S/m]

Mesh
  mesh1 "网格 1"
    size: MeshSizeDefault "大小" | hauto = 1
    ftri1: FreeTri "自由三角形网格 1" on remaining entities | smoothmaxiter = 4; smoothmaxdepth = 4

Studies
  stdC "研究"
  stdC2 "研究 2"
    step1: Stationary "稳态 1"
  stdLM "研究 3"
    step1: Frequency "频域 1"
  stdLMstat "研究 4"
    step1: Stationary "稳态 1"

Solver configurations
  sol1 "解 1" (study stdC2)
    v1: Variables "因变量 1"
    s1: Stationary "稳态求解器 1"
      dDef: Direct "直接"
      fc1: FullyCoupled "全耦合 1"
  sol2 "解 2" (study stdLM)
    v1: Variables "因变量 1"
    s1: Stationary "稳态求解器 1"
      dDef: Direct "直接"
      p1: Parametric "参数化 1"
      fc1: FullyCoupled "全耦合 1"
  sol3 "解 3" (study stdLMstat)
    v1: Variables "因变量 1"
    s1: Stationary "稳态求解器 1"
      dDef: Direct "直接"
      fc1: FullyCoupled "全耦合 1"

Datasets
  dset1: Solution | solution = sol1
  dset2: Solution | solution = sol2
  dset3: Solution | solution = sol3

Derived values
  eva1: Eval "计算 1" on all domains | data = dset1; expr = inductioncurrents.intWm
  eva2: Eval "计算 2" on all domains | data = dset1; expr = mf.intWm
  eva3: Eval "计算 3" on all domains | data = dset1; expr = inductioncurrents.normB
  eva4: Eval "计算 4" on all domains | data = dset1; expr = Aphi
  eva5: Eval "计算 5" on all domains | data = dset1; expr = inductioncurrents.Aphi
  eva6: Eval "计算 6" on all domains | data = dset1; expr = mf.Aphi
  eva7: Eval "计算 7" on all domains | data = dset1; expr = Bphi
  eva8: Eval "计算 8" on all domains | data = dset1; expr = inductioncurrents.Br
  eva9: Eval "计算 9" on all domains | data = dset1; expr = mf.Br
  eva10: Eval "计算 10" on all domains | data = dset3; expr = inductioncurrents.intWm
  eva11: Eval "计算 11" on all domains | data = dset3; expr = inductioncurrents.normB

Plots
  pg_geom: PlotGroup2D "EXP-020 geometry" | data = dset1
    pg_geom_f: Surface "表面" | expr = 1
  pg_mesh: PlotGroup2D "EXP-020 final mesh" | data = dset1
    pg_mesh_f: Mesh "网格"
  pg_E: PlotGroup2D "P1 electric field" | data = dset1
    pg_E_f: Surface "表面" | expr = es.normE
  pg_B: PlotGroup2D "P1 magnetic flux density" | data = dset3
    pg_B_f: Surface "表面" | expr = mf.normB
  pg_PS: PlotGroup2D "P1 plus S1 coupled electric field" | data = dset1
    pg_PS_f: Surface "表面" | expr = es.normE

Exports
  img_pg_geom: Image "图像"
    source = /Results/ResultFeatureList/pg_geom
    width = 1800
    height = 1200
    pngfilename = D:\高频变压器\hft-worktrees\experiments\experiments\experiment20_comsol_turn_matrix_teacher_20260915\figures\convergence\geometry.png
  img_pg_mesh: Image "图像 2"
    source = /Results/ResultFeatureList/pg_mesh
    width = 1800
    height = 1200
    pngfilename = D:\高频变压器\hft-worktrees\experiments\experiments\experiment20_comsol_turn_matrix_teacher_20260915\figures\convergence\final_mesh.png
  img_pg_E: Image "图像 3"
    source = /Results/ResultFeatureList/pg_E
    width = 1800
    height = 1200
    pngfilename = D:\高频变压器\hft-worktrees\experiments\experiments\experiment20_comsol_turn_matrix_teacher_20260915\figures\convergence\P1_electric_field.png
  img_pg_B: Image "图像 4"
    source = /Results/ResultFeatureList/pg_B
    width = 1800
    height = 1200
    pngfilename = D:\高频变压器\hft-worktrees\experiments\experiments\experiment20_comsol_turn_matrix_teacher_20260915\figures\convergence\P1_magnetic_flux_density.png
  img_pg_PS: Image "图像 5"
    source = /Results/ResultFeatureList/pg_PS
    width = 1800
    height = 1200
    pngfilename = D:\高频变压器\hft-worktrees\experiments\experiments\experiment20_comsol_turn_matrix_teacher_20260915\figures\convergence\P1_S1_coupled_field.png